L := 8
P := 3000
q := 1000
d := 1.5
z := 0
z1 := 0.1*L = 0.8
z2 := 0.2*L = 1.6
z3 := 0.3*L = 2.4
z4 := 0.4*L = 3.2
Qq1 := q*(L/2 - z1) = 3200
Mq1 := (q*z1)/2*(L - z1) = 2880
z5 := 0.5*L = 4
Mq1 = 2880
(q*z2)/2*(L - z2) = 5120
Qq2 := q*(L/2 - z2) = 2400
Mq2 := 5.12*10^3
Qq3 := q*(L/2 - z3) = 1600
(q*z3)/2*(L - z3) = 6720
Mq3 := 6.72*10^3
Qq4 := q*(L/2 - z4) = 800
Mq4 := 7.68*10^3
(q*z4)/2*(L - z4) = 7680
Mq5 := 8*10^3
Qq5 := q*(L/2 - z5) = 0
Mq := 0
(q*z5)/2*(L - z5) = 8000
Qq := q*(L/2 - z) = 4000
(q*z)/2*(L - z) = 0
# Для 0.2L
Rb := (-P*(0.2*L - d/2) - P*(0.2*L + d/2))/(-L) = 1200
Ra := 2*P - Rb = 4800
x1 := 0.2*L - d/2 = 0.85
x2 := d
x3 := L - (0.2*L + d/2)
Mp1 := Ra*x1 = 4080
Qp1 := Ra = 4800
Qp2 := Ra - P = 1800
Mp2 := Ra*(0.2*L - d/2 + x2) = 11280
Mp3 := Ra*(0.2*L + d/2 + x3) - P*(d + x3) - P*x3 = 0
Qp3 := Ra - 2*P = -1200
# Для 0.3L
Rb := (-P*(0.3*L - d/2) - P*(0.3*L + d/2))/(-L) = 1800
Ra := 2*P - Rb = 4200
x1 := 0.3*L - d/2
x2 := d
x3 := 0
Mp1 := Ra*x1 = 6930
Qp1 := Ra = 4200
Qp2 := Ra - P = 1200
Mp2 := Ra*(0.3*L - d/2 + x2) = 13230
Mp3 := Ra*(0.3*L + d/2 + x3) - P*(d + x3) - P*x3 = 8730
Qp3 := Ra - 2*P = -1800
# Для 0.4L
Rb := (-P*(0.4*L - d/2) - P*(0.4*L + d/2))/(-L) = 2400
Ra := 2*P - Rb = 3600
x1 := 0.4*L - d/2
x2 := d
x3 := L - (0.4*L + d/2)
Mp1 := Ra*x1 = 8820
Qp1 := Ra = 3600
Qp2 := Ra - P = 600
Mp2 := Ra*(0.4*L - d/2 + x2) = 14220
Mp3 := Ra*(0.4*L + d/2 + x3) - P*(d + x3) - P*x3 = 0
Qp3 := Ra - 2*P = -2400
# Для 0.5L
Rb := (-P*(0.5*L - d/2) - P*(0.5*L + d/2))/(-L) = 3000
Ra := 2*P - Rb = 3000
x1 := 0
x2 := 0
x3 := 0
Mp1 := Ra*x1 = 0
Qp1 := Ra = 3000
Qp2 := Ra - P = 0
Mp2 := Ra*(0.5*L - d/2 + x2) = 9750
Mp3 := Ra*(0.5*L + d/2 + x3) - P*(d + x3) - P*x3 = 9750
Qp3 := Ra - 2*P = -3000
L1 := 800
fmax := 1/500*L1 = 1.6
m1 := 0.9
Rc := 2100
n1 := 1.1
n2 := 1.3
E := 2*10^6
hж := 1/4*Rc*m1/E*L1*L1/fmax*(5/(6*n1) + 1/n2*(1 - (L1 - d)^2/(3*L1^2))) = 120.143
Mpmax := 1.425*10^4 = 14250
Mqmax := 8*10^3
5000 = 5000
h := 8.5
Sb := 1*sqrt(h)/12.5 = 0.233238
Sr := Sb*1.2 = 0.279886
br := 20*Sr = 5.59771
hb := h - 2*Sr = 7.94023
hэ := sqrt(3*(Mqmax*n1 + Mpmax*n2)/(2*Rc*m1*Sb)) = 9.64262
Jф := (Sb*hb^3)/12 + 2*(br*Sr^3/12 + br*Sr*((h - Sr)/2)^2) = 62.6824
Gmax := (Mqmax*n1 + Mpmax*n2)*h/(Jф*m1*2) = 2058.55
Sоб := br*Sr*((hb + Sr)/2) + hb/2*Sb + hb/4 = 9.35035
Qqmax := 4*10^3
Qpmax := 5.4*10^3
Tmax := ((Qqmax*n1 + Qpmax*n2)*Sоб)/(Jф*Sb*m1) = 8115.33
Mqx := q*zоб*(Lоб - zоб)/2  # error: Эта переменная не определена.
Тж := 2323
Gж := (Mqmax*n1 + Mpmax*n2)/(Jф*m1)
Qqx := q(Lоб/2 - zоб)  # error: Эта переменная не определена.
Gэкв := 12313
# для икс равно нулю
zоб0 := 2
dоб0 := 2
Mqx := q*zоб0*(L - zоб0)/2 = 6000
Qqx := q*(L/2 - zоб0) = 2000
Mpx := □  # error: Пустой местозаполнитель.
